*Heading
** Job name: 1_MR_plan Model name: PlanarShear_MR
** Generated by: Abaqus/CAE 2025
*Preprint, echo=NO, model=NO, history=NO, contact=NO
**
** PARTS
**
*Part, name="pure shear sample w partition-1"
*Node
      1,    704.47699,         -0.5,  -17.8166332
      2,    704.47699,         -0.5,  -51.8166313
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*Element, type=C3D8RH
  1, 121, 139, 270,  61, 461, 479, 610, 401
  2, 161, 311, 271, 133, 501, 651, 611, 473
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*Nset, nset=_PickedSet2, internal, generate
   1,  680,    1
*Elset, elset=_PickedSet2, internal, generate
   1,  295,    1
** Section: BBIDNO30
*Solid Section, elset=_PickedSet2, material=Material-1
,
*End Part
**
*Part, name="pure shear sample w partition-2"
*Node
      1,    489.47702,         -0.5,   2.18336749
      2,    489.47702,         -0.5,   36.1833687
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*Element, type=C3D8RH
  1,  51, 288, 209, 162, 410, 647, 568, 521
  2,  57,  55, 176, 136, 416, 414, 535, 495
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*Nset, nset=_PickedSet2, internal, generate
   1,  718,    1
*Elset, elset=_PickedSet2, internal, generate
   1,  314,    1
** Section: BBIDNO30
*Solid Section, elset=_PickedSet2, material=Material-1
,
*End Part
**
*Part, name="pure shear sample w partition-3"
*Node
      1,    704.47699,           1.,   2.18336749
      2,    704.47699,           1.,   1.68336737
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*Element, type=C3D8RH
    1, 17672, 17673, 17714, 17713,     1,     2,    43,    42
    2, 17673, 17674, 17715, 17714,     2,     3,    44,    43
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*Nset, nset=_PickedSet2, internal, generate
     1,  70684,      1
*Elset, elset=_PickedSet2, internal, generate
     1,  51600,      1
*Nset, nset=Bottom
 9069,
*Nset, nset=Top
 9095,
** Section: BBIDNO30
*Solid Section, elset=_PickedSet2, material=Material-1
,
*End Part
**
**
** ASSEMBLY
**
*Assembly, name=Assembly
**
*Instance, name="pure shear sample w partition-1-1", part="pure shear sample w partition-1"
 -596.977012,    36.183367,        -0.25
 -596.977012,    36.183367,        -0.25,  -595.977012,    36.183367,        -0.25,          90.
*End Instance
**
*Instance, name="pure shear sample w partition-2-1", part="pure shear sample w partition-2"
 -596.977012,    36.183367,        -0.25
 -596.977012,    36.183367,        -0.25,  -595.977012,    36.183367,        -0.25,          90.
*End Instance
**
*Instance, name="pure shear sample w partition-3-1", part="pure shear sample w partition-3"
 -596.977012,    36.183367,        -0.25
 -596.977012,    36.183367,        -0.25,  -595.977012,    36.183367,        -0.25,          90.
*End Instance
**
*Node
      1, -1.74685397e-07,          88., -3.60822483e-15
*Node
      2, -1.74685397e-07, -3.82696555e-07, 1.77635684e-15
*Nset, nset=_PickedSet24, internal
 1,
*Nset, nset=_PickedSet25, internal, instance="pure shear sample w partition-1-1", generate
   1,  680,    1
*Elset, elset=_PickedSet25, internal, instance="pure shear sample w partition-1-1", generate
   1,  295,    1
*Nset, nset=_PickedSet26, internal
 2,
*Nset, nset=_PickedSet27, internal, instance="pure shear sample w partition-2-1", generate
   1,  718,    1
*Elset, elset=_PickedSet27, internal, instance="pure shear sample w partition-2-1", generate
   1,  314,    1
*Nset, nset=_PickedSet32, internal, instance="pure shear sample w partition-2-1"
   2,   4,  84,  85,  86,  87
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*Elset, elset=_PickedSet32, internal, instance="pure shear sample w partition-2-1"
  46,  62, 113, 168, 169, 171
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*Nset, nset=_PickedSet33, internal, instance="pure shear sample w partition-1-1"
   2,   4,  84,  85,  86,  87
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*Elset, elset=_PickedSet33, internal, instance="pure shear sample w partition-1-1"
  16,  17,  47, 100, 138, 148
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*Elset, elset=__PickedSurf28_S5, internal, instance="pure shear sample w partition-1-1"
  51, 143, 171, 173, 181, 223
*Elset, elset=__PickedSurf28_S3, internal, instance="pure shear sample w partition-1-1"
  90, 118, 146, 212, 222
*Elset, elset=__PickedSurf28_S6, internal, instance="pure shear sample w partition-1-1"
 144, 150, 169
*Elset, elset=__PickedSurf28_S4, internal, instance="pure shear sample w partition-1-1"
 170, 186, 205, 217, 218, 233
*Surface, type=ELEMENT, name=_PickedSurf28, internal
__PickedSurf28_S5, S5
__PickedSurf28_S3, S3
__PickedSurf28_S6, S6
__PickedSurf28_S4, S4
*Elset, elset=__PickedSurf29_S4, internal, instance="pure shear sample w partition-3-1", generate
    40,  51600,     40
*Surface, type=ELEMENT, name=_PickedSurf29, internal
__PickedSurf29_S4, S4
*Elset, elset=__PickedSurf30_S6, internal, instance="pure shear sample w partition-2-1"
  31, 153
*Elset, elset=__PickedSurf30_S5, internal, instance="pure shear sample w partition-2-1"
  38, 150, 151, 208, 216
*Elset, elset=__PickedSurf30_S3, internal, instance="pure shear sample w partition-2-1"
  52,  60, 185, 220, 238, 304
*Elset, elset=__PickedSurf30_S4, internal, instance="pure shear sample w partition-2-1"
 136, 152, 204, 213, 217, 230, 253
*Surface, type=ELEMENT, name=_PickedSurf30, internal
__PickedSurf30_S6, S6
__PickedSurf30_S5, S5
__PickedSurf30_S4, S4
__PickedSurf30_S3, S3
*Elset, elset=__PickedSurf31_S6, internal, instance="pure shear sample w partition-3-1", generate
     1,  51561,     40
*Surface, type=ELEMENT, name=_PickedSurf31, internal
__PickedSurf31_S6, S6
** Constraint: BottomRigid
*Rigid Body, ref node=_PickedSet26, elset=_PickedSet27
** Constraint: BottomTie
*Tie, name=BottomTie, adjust=yes
_PickedSurf31, _PickedSurf30
** Constraint: TopRigid
*Rigid Body, ref node=_PickedSet24, elset=_PickedSet25
** Constraint: TopTie
*Tie, name=TopTie, adjust=yes
_PickedSurf29, _PickedSurf28
*End Assembly
**
** MATERIALS
**
*Material, name=Material-1
*Density
 1.06e-09,
*Hyperelastic, mooney-rivlin
 0.058239, 0.047687,       0.
**
** BOUNDARY CONDITIONS
**
** Name: Bottom fix Type: Symmetry/Antisymmetry/Encastre
*Boundary
_PickedSet32, ENCASTRE
** ----------------------------------------------------------------
**
** STEP: PlanarShear
**
*Step, name=PlanarShear, nlgeom=YES, inc=20000
*Static
0.01, 1., 1e-05, 0.05
**
** BOUNDARY CONDITIONS
**
** Name: Tension Type: Displacement/Rotation
*Boundary
_PickedSet33, 2, 2, 50.
**
** OUTPUT REQUESTS
**
*Restart, write, frequency=0
**
** FIELD OUTPUT: F-Output-1
**
*Output, field
*Node Output
RF, U
*Element Output, directions=YES
LE, S
**
** HISTORY OUTPUT: Bottom
**
*Output, history
*Node Output, nset="pure shear sample w partition-3-1".Bottom
U2,
**
** HISTORY OUTPUT: Top
**
*Node Output, nset="pure shear sample w partition-3-1".Top
U2,
*End Step
