*Heading
** Job name: 1_MR_tension Model name: Tension_MR
** Generated by: Abaqus/CAE 2025
*Preprint, echo=NO, model=NO, history=NO, contact=NO
**
** PARTS
**
*Part, name=dogbone_sample_3D
*Node
      1,  -43.1826057,           7.,   36.9848824
      2,  -43.1826057,           5.,   36.9848824
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*Element, type=C3D20RH
  1,   15,   16,   18,   17,    1,    2,    4,    3,  690,  689,  688,  687,  691,  692,  693,
      694,  696,  695,  697,  698
  2,   17,   18,   20,   19,    3,    4,    6,    5,  688,  701,  700,  699,  693,  702,  703,
      704,  698,  697,  705,  706
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*Nset, nset=_PickedSet2, internal, generate
    1,  2289,     1
*Elset, elset=_PickedSet2, internal, generate
   1,  288,    1
*Nset, nset=set
 343,
** Section: BBDINO30
*Solid Section, elset=_PickedSet2, material=BBIDNO30
,
*End Part
**
**
** ASSEMBLY
**
*Assembly, name=Assembly
**
*Instance, name=dogbone_sample_3D-1, part=dogbone_sample_3D
   30.682606,    36.984882,          -6.
   30.682606,    36.984882,          -6.,    31.682606,    36.984882,          -6.,          90.
*End Instance
**
*Nset, nset=Bottom, instance=dogbone_sample_3D-1
 301,
*Nset, nset=Top, instance=dogbone_sample_3D-1
 385,
*Nset, nset=_PickedSet12, internal, instance=dogbone_sample_3D-1
   1,   2,   3,   4,   5,   6
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*Elset, elset=_PickedSet12, internal, instance=dogbone_sample_3D-1, generate
 1,  6,  1
*Nset, nset=_PickedSet13, internal, instance=dogbone_sample_3D-1
  673,  674,  675,  676,  677,  678
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*Elset, elset=_PickedSet13, internal, instance=dogbone_sample_3D-1, generate
 283,  288,    1
*End Assembly
**
** MATERIALS
**
*Material, name=BBIDNO30
*Density
 1.06e-09,
*Hyperelastic, mooney-rivlin
 0.058239, 0.047687,       0.
**
** BOUNDARY CONDITIONS
**
** Name: Bottom_Fix Type: Symmetry/Antisymmetry/Encastre
*Boundary
_PickedSet12, ENCASTRE
** ----------------------------------------------------------------
**
** STEP: Tension
**
*Step, name=Tension, nlgeom=YES, inc=5000
*Static
0.01, 1., 1e-05, 0.05
**
** BOUNDARY CONDITIONS
**
** Name: Tension Type: Displacement/Rotation
*Boundary
_PickedSet13, 2, 2, 80.
**
** OUTPUT REQUESTS
**
*Restart, write, frequency=0
**
** FIELD OUTPUT: F-Output-1
**
*Output, field
*Node Output
RF, U
*Element Output, directions=YES
E, S
**
** HISTORY OUTPUT: Bottom
**
*Output, history
*Node Output, nset=Bottom
U2,
**
** HISTORY OUTPUT: Top
**
*Node Output, nset=Top
U2,
*End Step
