*Heading
** Job name: 1_MR_comp3 Model name: Compression_MR_3
** Generated by: Abaqus/CAE 2025
*Preprint, echo=NO, model=NO, history=NO, contact=NO
**
** PARTS
**
*Part, name=compression_sample_3D
*Node
      1,   14.3000002,        -6.25,         6.25
      2,  -14.3000002,        -6.25,         6.25
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*Element, type=C3D10H
    1,  2637,  2638,  2639,  2640, 10129, 10128, 10127, 10131, 10130, 10132
    2,  2641,  2638,  2639,  2637, 10134, 10128, 10133, 10135, 10129, 10127
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*Nset, nset=_PickedSet2, internal, generate
     1,  75839,      1
*Elset, elset=_PickedSet2, internal, generate
     1,  52954,      1
** Section: BBDINO30
*Solid Section, elset=_PickedSet2, material=BBIDNO30
,
*End Part
**
**
** ASSEMBLY
**
*Assembly, name=Assembly
**
*Instance, name=compression_sample_3D-1, part=compression_sample_3D
          0.,         6.25,        -6.25
*End Instance
**
*Node
      1,           0.,         12.5, 2.30926389e-14
*Node
      2,           0.,           0., -2.04281037e-14
*Nset, nset=BottomRP
 2,
*Nset, nset=TopRP
 1,
*Nset, nset=_PickedSet47, internal, instance=compression_sample_3D-1
     1,     2,     5,     6,     7,     8
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*Elset, elset=_PickedSet47, internal, instance=compression_sample_3D-1
    80,   338,   406,   449,   616,   730
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*Nset, nset=_PickedSet68, internal, instance=compression_sample_3D-1
     1,     2,     3,     4,    93,    94
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*Elset, elset=_PickedSet68, internal, instance=compression_sample_3D-1
    35,  1985,  3947,  3997,  5017,  6147
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*Elset, elset=__PickedSurf69_S3, internal, instance=compression_sample_3D-1
    80,   338,   406,   449,   616,   758
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*Elset, elset=__PickedSurf69_S4, internal, instance=compression_sample_3D-1
   730,  3841,  3863,  4593,  4942,  5015
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*Elset, elset=__PickedSurf69_S2, internal, instance=compression_sample_3D-1
  2515,  4089,  4187,  4294,  5215,  5343
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*Elset, elset=__PickedSurf69_S1, internal, instance=compression_sample_3D-1
  4937,  5490,  8779, 14370, 14533, 20920, 21651, 28149, 30816, 30851, 31873, 32079, 35614, 35619, 40606
*Surface, type=ELEMENT, name=_PickedSurf69, internal
__PickedSurf69_S3, S3
__PickedSurf69_S4, S4
__PickedSurf69_S2, S2
__PickedSurf69_S1, S1
*Elset, elset=__PickedSurf74_S3, internal, instance=compression_sample_3D-1
   954,  1175,  1367,  1790,  2036,  2212
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*Elset, elset=__PickedSurf74_S1, internal, instance=compression_sample_3D-1
  1690,  3761,  8329,  8683,  8904,  9211
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*Elset, elset=__PickedSurf74_S4, internal, instance=compression_sample_3D-1
  3636,  5832,  9140, 10133, 10269, 10361
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*Elset, elset=__PickedSurf74_S2, internal, instance=compression_sample_3D-1
  3998,  4015,  4048,  6671,  6851,  7986
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*Surface, type=ELEMENT, name=_PickedSurf74, internal
__PickedSurf74_S3, S3
__PickedSurf74_S1, S1
__PickedSurf74_S4, S4
__PickedSurf74_S2, S2
** Constraint: Coupling_bottom
*Coupling, constraint name=Coupling_bottom, ref node=BottomRP, surface=_PickedSurf69
*Distributing, weighting method=UNIFORM
1, 1
2, 2
3, 3
** Constraint: Coupling_top
*Coupling, constraint name=Coupling_top, ref node=TopRP, surface=_PickedSurf74
*Distributing, weighting method=UNIFORM
1, 1
2, 2
3, 3
*End Assembly
**
** MATERIALS
**
*Material, name=BBIDNO30
*Density
 1.06e-09,
*Hyperelastic, mooney-rivlin
 0.058239, 0.047687,       0.
**
** BOUNDARY CONDITIONS
**
** Name: Bottom_Fix Type: Symmetry/Antisymmetry/Encastre
*Boundary
BottomRP, ENCASTRE
** ----------------------------------------------------------------
**
** STEP: Compression
**
*Step, name=Compression, nlgeom=YES, inc=20000
*Static
0.01, 1., 1e-05, 0.05
**
** BOUNDARY CONDITIONS
**
** Name: Bottom_constraint Type: Displacement/Rotation
*Boundary
_PickedSet47, 2, 2
** Name: Compression Type: Displacement/Rotation
*Boundary
TopRP, 2, 2, -5.0014
** Name: VerticalLineConstraint Type: Displacement/Rotation
*Boundary
_PickedSet68, 3, 3
**
** OUTPUT REQUESTS
**
*Restart, write, frequency=0
**
** FIELD OUTPUT: F-Output-1
**
*Output, field
*Node Output
RF, U
*Element Output, directions=YES
E, S
**
** HISTORY OUTPUT: Force_Disp
**
*Output, history
*Node Output, nset=TopRP
RF2, U2
*End Step
